!2017年10月20日
!塔身建模分析宏
!标准节类型：四面人字腹杆
!附着层数：四层
![自动提取结果][增量求解][link附着]
!Z+为向上方向
!
FLAG=0   !循环计次变量
!修改循环中JJ的位置，可实现对不同参数增量求解
*DO,JJ,0,1000,100   !循环求解开始
FLAG=FLAG+1
PARSAV  !清空前保存标量参数
/CLEAR
PARRES  !清空后释放标量参数
/PREP7
!所有输入参数定义
!定义立柱截面，H型钢
w1=300
w2=300
t1=20   !!!!!可变参数
t2=15   !!!!!可变参数
!定义腹杆截面，方管
b1=100
t3=10   !!!!!可变参数
!定义顶部十字梁，矩形
b2=300   !!!!!可变参数
!定义塔身参数
L1=2000+JJ   !!!!!标准节中心距
H1=3000  !标准节每档高度
N1=30    !!!!!标准节数量
N2=N1*2  !标准节档数
N3=12    !!!!!第一层附着位置，从下往上第几档上端
N4=12    !!!!!第二层附着位置，从第一层网上第几档上端
N5=12    !!!!!第三层附着位置，从第二层网上第几档上端
N6=12    !!!!!第四层附着位置，从第三层网上第几档上端
!定义载荷，作用与NODE((N2+1)*8+1)
FFZ=100    !!!!!顶部竖向力，单位：吨
FFH=8      !!!!!顶部水平力，单位：吨
MTT=300  !!!!!顶部弯矩，单位：吨.米
!LINK10单元参数
LLINK=100
ALINK=31400
!第一层附着八个节点的反力数组：节点号，FX,FY
*DIM,UPSOL,ARRAY,8,3
UPFX=0
UPFY=0
!第二层附着八个节点的反力数组：节点号，FX,FY
*DIM,UPSOL2,ARRAY,8,3
UPFX2=0
UPFY2=0
!第三层附着八个节点的反力数组：节点号，FX,FY
*DIM,UPSOL3,ARRAY,8,3
UPFX3=0
UPFY3=0
!第四层附着八个节点的反力数组：节点号，FX,FY
*DIM,UPSOL4,ARRAY,8,3
UPFX4=0
UPFY4=0
!底部固定四个节点的反力数组：节点号，FX,FY,FZ
*DIM,DOWNSOL,ARRAY,4,4
DOWNFX=0
DOWNFY=0
DOWNFZ=0
X4 = 10000

!定义单元类型、材料属性
ET,1,BEAM188
MP,EX,1,2.1E5
MP,PRXY,1,0.3
MP,DENS,1,7.85E-9

ET,2,LINK10
R,2,ALINK
MP,EX,2,2.1E6    !特别加强刚度
MP,DENS,2,7.85E-9
KEYOPT,2,3,1     !1表示仅受压，0表示仅受拉

!定义立柱截面，H型钢
SECTYPE,1,BEAM,I,,0
SECOFFSET,CENT
SECDATA,w1,w1,w2,t1,t1,t2
!定义腹杆截面，方管
SECTYPE,2,BEAM,HREC,,0
SECOFFSET,CENT
SECDATA,b1,b1,t3,t3,t3,t3
!定义顶部十字梁，矩形
SECTYPE,3,BEAM,RECT,,0
SECOFFSET,CENT
SECDATA,b2,b2

!定义节点
*DO,i,1,(N2+1)
N,((i-1)*8+1),L1/2 ,L1/2 ,(i-1)*H1
N,((i-1)*8+2),L1/2 ,0    ,(i-1)*H1
N,((i-1)*8+3),L1/2 ,-L1/2,(i-1)*H1
N,((i-1)*8+4),0    ,-L1/2,(i-1)*H1
N,((i-1)*8+5),-L1/2,-L1/2,(i-1)*H1
N,((i-1)*8+6),-L1/2,0    ,(i-1)*H1
N,((i-1)*8+7),-L1/2,L1/2 ,(i-1)*H1
N,((i-1)*8+8),0    ,L1/2 ,(i-1)*H1
*ENDDO
N,((N2+1)*8+1),0,0,N2*H1  !顶部中心点
!定义第一层附着处8个LINK10仅受压单元的节点
!N3*8+1
N,((N2+1)*8+2),L1/2+LLINK ,L1/2       ,N3*H1  !X
N,((N2+1)*8+3),L1/2       ,L1/2+LLINK ,N3*H1  !Y
!N3*8+3
N,((N2+1)*8+4),L1/2+LLINK ,-L1/2      ,N3*H1  !X
N,((N2+1)*8+5),L1/2       ,-L1/2-LLINK,N3*H1  !Y
!N3*8+5
N,((N2+1)*8+6),-L1/2-LLINK,-L1/2      ,N3*H1  !X
N,((N2+1)*8+7),-L1/2      ,-L1/2-LLINK,N3*H1  !Y
!N3*8+7
N,((N2+1)*8+8),-L1/2-LLINK,L1/2       ,N3*H1  !X
N,((N2+1)*8+9),-L1/2      ,L1/2+LLINK ,N3*H1  !Y
!定义第二层附着处8个LINK10仅受压单元的节点
!(N3+N4)*8+1
N,((N2+1)*8+10),L1/2+LLINK ,L1/2       ,(N3+N4)*H1  !X
N,((N2+1)*8+11),L1/2       ,L1/2+LLINK ,(N3+N4)*H1  !Y
!(N3+N4)*8+3
N,((N2+1)*8+12),L1/2+LLINK ,-L1/2      ,(N3+N4)*H1  !X
N,((N2+1)*8+13),L1/2       ,-L1/2-LLINK,(N3+N4)*H1  !Y
!(N3+N4)*8+5
N,((N2+1)*8+14),-L1/2-LLINK,-L1/2      ,(N3+N4)*H1  !X
N,((N2+1)*8+15),-L1/2      ,-L1/2-LLINK,(N3+N4)*H1  !Y
!(N3+N4)*8+7
N,((N2+1)*8+16),-L1/2-LLINK,L1/2       ,(N3+N4)*H1  !X
N,((N2+1)*8+17),-L1/2      ,L1/2+LLINK ,(N3+N4)*H1  !Y
!定义第三层附着处8个LINK10仅受压单元的节点
!(N3+N4+N5)*8+1
N,((N2+1)*8+18),L1/2+LLINK ,L1/2       ,(N3+N4+N5)*H1  !X
N,((N2+1)*8+19),L1/2       ,L1/2+LLINK ,(N3+N4+N5)*H1  !Y
!(N3+N4+N5)*8+3
N,((N2+1)*8+20),L1/2+LLINK ,-L1/2      ,(N3+N4+N5)*H1  !X
N,((N2+1)*8+21),L1/2       ,-L1/2-LLINK,(N3+N4+N5)*H1  !Y
!(N3+N4+N5)*8+5
N,((N2+1)*8+22),-L1/2-LLINK,-L1/2      ,(N3+N4+N5)*H1  !X
N,((N2+1)*8+23),-L1/2      ,-L1/2-LLINK,(N3+N4+N5)*H1  !Y
!(N3+N4+N5)*8+7
N,((N2+1)*8+24),-L1/2-LLINK,L1/2       ,(N3+N4+N5)*H1  !X
N,((N2+1)*8+25),-L1/2      ,L1/2+LLINK ,(N3+N4+N5)*H1  !Y
!定义第四层附着处8个LINK10仅受压单元的节点
!(N3+N4+N5+N6)*8+1
N,((N2+1)*8+26),L1/2+LLINK ,L1/2       ,(N3+N4+N5+N6)*H1  !X
N,((N2+1)*8+27),L1/2       ,L1/2+LLINK ,(N3+N4+N5+N6)*H1  !Y
!(N3+N4+N5+N6)*8+3
N,((N2+1)*8+28),L1/2+LLINK ,-L1/2      ,(N3+N4+N5+N6)*H1  !X
N,((N2+1)*8+29),L1/2       ,-L1/2-LLINK,(N3+N4+N5+N6)*H1  !Y
!(N3+N4+N5+N6)*8+5
N,((N2+1)*8+30),-L1/2-LLINK,-L1/2      ,(N3+N4+N5+N6)*H1  !X
N,((N2+1)*8+31),-L1/2      ,-L1/2-LLINK,(N3+N4+N5+N6)*H1  !Y
!(N3+N4+N5+N6)*8+7
N,((N2+1)*8+32),-L1/2-LLINK,L1/2       ,(N3+N4+N5+N6)*H1  !X
N,((N2+1)*8+33),-L1/2      ,L1/2+LLINK ,(N3+N4+N5+N6)*H1  !Y

!建立单元
TYPE,1
MAT,1
!1、立柱单元
SECNUM,1
*DO,i,1,N2
E,((i-1)*8+1),(i*8+1)
E,((i-1)*8+3),(i*8+3)
E,((i-1)*8+5),(i*8+5)
E,((i-1)*8+7),(i*8+7)
*ENDDO
!2、腹杆单元
SECNUM,2
!2-1、横腹杆
*DO,i,1,(N2+1)
E,((i-1)*8+1),((i-1)*8+2)
E,((i-1)*8+2),((i-1)*8+3)
E,((i-1)*8+3),((i-1)*8+4)
E,((i-1)*8+4),((i-1)*8+5)
E,((i-1)*8+5),((i-1)*8+6)
E,((i-1)*8+6),((i-1)*8+7)
E,((i-1)*8+7),((i-1)*8+8)
E,((i-1)*8+8),((i-1)*8+1)
*ENDDO
!2-2、斜腹杆
*DO,i,1,N2
E,((i-1)*8+1),(i*8+2)
E,((i-1)*8+3),(i*8+2)
E,((i-1)*8+3),(i*8+4)
E,((i-1)*8+5),(i*8+4)
E,((i-1)*8+5),(i*8+6)
E,((i-1)*8+7),(i*8+6)
E,((i-1)*8+7),(i*8+8)
E,((i-1)*8+1),(i*8+8)
*ENDDO
!3、顶部十字单元
SECNUM,3
E,((N2+1)*8+1),(N2*8+1)
E,((N2+1)*8+1),(N2*8+3)
E,((N2+1)*8+1),(N2*8+5)
E,((N2+1)*8+1),(N2*8+7)
!4、第一层附着处LINK10单元
TYPE,2
MAT,2
REAL,2
E,N3*8+1,((N2+1)*8+2)
E,N3*8+1,((N2+1)*8+3)
E,N3*8+3,((N2+1)*8+4)
E,N3*8+3,((N2+1)*8+5)
E,N3*8+5,((N2+1)*8+6)
E,N3*8+5,((N2+1)*8+7)
E,N3*8+7,((N2+1)*8+8)
E,N3*8+7,((N2+1)*8+9)
!5、第二层附着处LINK10单元
E,(N3+N4)*8+1,((N2+1)*8+10)
E,(N3+N4)*8+1,((N2+1)*8+11)
E,(N3+N4)*8+3,((N2+1)*8+12)
E,(N3+N4)*8+3,((N2+1)*8+13)
E,(N3+N4)*8+5,((N2+1)*8+14)
E,(N3+N4)*8+5,((N2+1)*8+15)
E,(N3+N4)*8+7,((N2+1)*8+16)
E,(N3+N4)*8+7,((N2+1)*8+17)
!6、第三层附着处LINK10单元
E,(N3+N4+N5)*8+1,((N2+1)*8+18)
E,(N3+N4+N5)*8+1,((N2+1)*8+19)
E,(N3+N4+N5)*8+3,((N2+1)*8+20)
E,(N3+N4+N5)*8+3,((N2+1)*8+21)
E,(N3+N4+N5)*8+5,((N2+1)*8+22)
E,(N3+N4+N5)*8+5,((N2+1)*8+23)
E,(N3+N4+N5)*8+7,((N2+1)*8+24)
E,(N3+N4+N5)*8+7,((N2+1)*8+25)
!7、第四层附着处LINK10单元
E,(N3+N4+N5+N6)*8+1,((N2+1)*8+26)
E,(N3+N4+N5+N6)*8+1,((N2+1)*8+27)
E,(N3+N4+N5+N6)*8+3,((N2+1)*8+28)
E,(N3+N4+N5+N6)*8+3,((N2+1)*8+29)
E,(N3+N4+N5+N6)*8+5,((N2+1)*8+30)
E,(N3+N4+N5+N6)*8+5,((N2+1)*8+31)
E,(N3+N4+N5+N6)*8+7,((N2+1)*8+32)
E,(N3+N4+N5+N6)*8+7,((N2+1)*8+33)
!定义边界条件
!底部固定约束
D,1,ALL,0
D,3,ALL,0
D,5,ALL,0
D,7,ALL,0
!第一层附着处LINK10节点约束
*DO,I,0,7
D,((N2+1)*8+2)+I,ALL,0
*ENDDO
!第二层附着处LINK10节点约束
*DO,I,0,7
D,((N2+1)*8+10)+I,ALL,0
*ENDDO
!第三层附着处LINK10节点约束
*DO,I,0,7
D,((N2+1)*8+18)+I,ALL,0
*ENDDO
!第四层附着处LINK10节点约束
*DO,I,0,7
D,((N2+1)*8+26)+I,ALL,0
*ENDDO

!定义载荷，作用与NODE((N2+1)*8+1)
F,((N2+1)*8+1),FZ,-FFZ*10000
F,((N2+1)*8+1),FY,-FFH*10000      !顶部水平力，注意方向
F,((N2+1)*8+1),MX,MTT*10000000   !弯矩方向，若考虑其它工况，须增加MY
!求解
/SOLU
ACEL,,,9800  !重力加速度
ALLSEL,ALL
SOLVE

!后处理提取结果数据
/POST1
!提取第一层附着8个节点的反力
*DO,I,1,8
UPSOL(I,1)=((N2+1)*8+1)+I
*ENDDO

*DO,I,1,8
*GET,UPSOL(I,2),NODE,UPSOL(I,1),RF,FX
*GET,UPSOL(I,3),NODE,UPSOL(I,1),RF,FY
*ENDDO
!第一层附着位置XY两个方向合力
*DO,I,1,8
UPFX=UPFX+UPSOL(I,2)
*ENDDO
*DO,I,1,8
UPFY=UPFY+UPSOL(I,3)
*ENDDO

!提取第二层附着8个节点的反力
*DO,I,1,8
UPSOL2(I,1)=((N2+1)*8+9)+I
*ENDDO

*DO,I,1,8
*GET,UPSOL2(I,2),NODE,UPSOL2(I,1),RF,FX
*GET,UPSOL2(I,3),NODE,UPSOL2(I,1),RF,FY
*ENDDO

!第二层附着位置XY两个方向合力
*DO,I,1,8
UPFX2=UPFX2+UPSOL2(I,2)
*ENDDO
*DO,I,1,8
UPFY2=UPFY2+UPSOL2(I,3)
*ENDDO

!提取第三层附着8个节点的反力
*DO,I,1,8
UPSOL3(I,1)=((N2+1)*8+17)+I
*ENDDO

*DO,I,1,8
*GET,UPSOL3(I,2),NODE,UPSOL3(I,1),RF,FX
*GET,UPSOL3(I,3),NODE,UPSOL3(I,1),RF,FY
*ENDDO

!第三层附着位置XY两个方向合力
*DO,I,1,8
UPFX3=UPFX3+UPSOL3(I,2)
*ENDDO
*DO,I,1,8
UPFY3=UPFY3+UPSOL3(I,3)
*ENDDO

!提取第四层附着8个节点的反力
*DO,I,1,8
UPSOL4(I,1)=((N2+1)*8+25)+I
*ENDDO

*DO,I,1,8
*GET,UPSOL4(I,2),NODE,UPSOL4(I,1),RF,FX
*GET,UPSOL4(I,3),NODE,UPSOL4(I,1),RF,FY
*ENDDO

!第四层附着位置XY两个方向合力
*DO,I,1,8
UPFX4=UPFX4+UPSOL4(I,2)
*ENDDO
*DO,I,1,8
UPFY4=UPFY4+UPSOL4(I,3)
*ENDDO

!提取底部固定四个节点的反力
DOWNSOL(1,1)=1
DOWNSOL(2,1)=3
DOWNSOL(3,1)=5
DOWNSOL(4,1)=7
*DO,I,1,4
*GET,DOWNSOL(I,2),NODE,DOWNSOL(I,1),RF,FX
*GET,DOWNSOL(I,3),NODE,DOWNSOL(I,1),RF,FY
*GET,DOWNSOL(I,4),NODE,DOWNSOL(I,1),RF,FZ
*ENDDO
!底部位置三个方向合力
*DO,I,1,4
DOWNFX=DOWNFX+DOWNSOL(I,2)
*ENDDO
*DO,I,1,4
DOWNFY=DOWNFY+DOWNSOL(I,3)
*ENDDO
*DO,I,1,4
DOWNFZ=DOWNFZ+DOWNSOL(I,4)
*ENDDO
!写出结果到文件
*CFOPEN,TRSOL11,txt,,Append
*VWRITE,
('----------------------------------')
*VWRITE,'SOLUTION  ',FLAG
(A12,F8.0)
*VWRITE,
('----------------------------------')
!塔身总高
*VWRITE,'H=',N2*H1/1000,'m'
(A8,'|',F12.2,'|',A12)
!第一层附着高度
*VWRITE,'A1=',N3*H1/1000,'m'
(A8,'|',F12.2,'|',A12)
!第二层附着高度
*VWRITE,'A2=',N4*H1/1000,'m'
(A8,'|',F12.2,'|',A12)
!第三层附着高度
*VWRITE,'A3=',N5*H1/1000,'m'
(A8,'|',F12.2,'|',A12)
!第四层附着高度
*VWRITE,'A4=',N6*H1/1000,'m'
(A8,'|',F12.2,'|',A12)
!悬臂高度
*VWRITE,'C=',(N2-N3-N4-N5-N6)*H1/1000,'m'
(A8,'|',F12.2,'|',A12)
!弯矩
*VWRITE,'M=',MTT,'t.m'
(A8,'|',F12.2,'|',A12)
!垂直力
*VWRITE,'F=',FFZ,'t'
(A8,'|',F12.2,'|',A12)
!标准节中心距
*VWRITE,'L1=',L1,'mm'
(A8,'|',F12.2,'|',A12)
!标准节立柱截面尺寸
*VWRITE,'Mast','H',w1,'x',w2,'x',t2,'x',t1
(A8,A4,F4.0,A1,F4.0,A1,F4.0,A1,F4.0)
!腹杆截面尺寸
*VWRITE,'Brace','RECT',b1,'x',t3
(A8,A4,F4.0,A1,F4.0)

*VWRITE,
('----UP-4---')
*VWRITE,'Node','F_X(t)','F_Y(t)'
(A8,'|',A12,'|',A12)
*DO,J,1,8
*VWRITE,UPSOL4(J,1)/1,UPSOL4(J,2)/X4,UPSOL4(J,3)/X4
(F8.0,'|',F12.2,'|',F12.2)
*ENDDO
*VWRITE,'Total',UPFX4/X4,UPFY4/X4
(A8,'|',F12.2,'|',F12.2)

*VWRITE,
('----UP-3---')
*VWRITE,'Node','F_X(t)','F_Y(t)'
(A8,'|',A12,'|',A12)
*DO,J,1,8
*VWRITE,UPSOL3(J,1)/1,UPSOL3(J,2)/X4,UPSOL3(J,3)/X4
(F8.0,'|',F12.2,'|',F12.2)
*ENDDO
*VWRITE,'Total',UPFX3/X4,UPFY3/X4
(A8,'|',F12.2,'|',F12.2)

*VWRITE,
('----UP-2---')
*VWRITE,'Node','F_X(t)','F_Y(t)'
(A8,'|',A12,'|',A12)
*DO,J,1,8
*VWRITE,UPSOL2(J,1)/1,UPSOL2(J,2)/X4,UPSOL2(J,3)/X4
(F8.0,'|',F12.2,'|',F12.2)
*ENDDO
*VWRITE,'Total',UPFX2/X4,UPFY2/X4
(A8,'|',F12.2,'|',F12.2)

*VWRITE,
('----UP-1---')
*VWRITE,'Node','F_X(t)','F_Y(t)'
(A8,'|',A12,'|',A12)
*DO,J,1,8
*VWRITE,UPSOL(J,1)/1,UPSOL(J,2)/X4,UPSOL(J,3)/X4
(F8.0,'|',F12.2,'|',F12.2)
*ENDDO
*VWRITE,'Total',UPFX/X4,UPFY/X4
(A8,'|',F12.2,'|',F12.2)

*VWRITE,
('----DOWN----')
*VWRITE,'Node','F_X(t)','F_Y(t)','F_Z(t)'
(A8,'|',A12,'|',A12,'|',A12)
*DO,J,1,4
*VWRITE,DOWNSOL(J,1)/1,DOWNSOL(J,2)/X4,DOWNSOL(J,3)/X4,DOWNSOL(J,4)/X4
(F8.0,'|',F12.2,'|',F12.2,'|',F12.2)
*ENDDO
*VWRITE,'Total',DOWNFX/X4,DOWNFY/X4,DOWNFZ/X4
(A8,'|',F12.2,'|',F12.2,'|',F12.2)
*VWRITE,
('---------------END----------------')
*CFCLOS
!写出到文件结束

*ENDDO     !循环求解结束
