!2017年11月1日
!塔身建模分析宏
!标准节类型：1-四面人字腹杆 2-四面K形腹杆 3-人字+顺斜腹杆
!附着层数：一层
![自动提取结果][增量求解][link附着][大变形开关]
!Z+为向上方向
!

!*DO,HH,0,6,1   !增量
*DO,KK,1,3,1  !循环3种标准节类型求解开始

TTYPE=KK  !标准节类型

FLAG=0   !循环计次变量

*DO,LL,0,12,2   !增量
!*DO,JJ,1,8,1   !循环8工况求解开始
JJ=1   !仅求解第一种工况

FLAG=FLAG+1
PARSAV  !清空前保存标量参数
/CLEAR
PARRES  !清空后释放标量参数
/PREP7
!所有输入参数定义
!定义立柱截面，H型钢
w1=300
w2=300
t1=20   !!!!!可变参数
t2=15   !!!!!可变参数
!定义腹杆截面
b1=125
t3=8+LL   !!!!!可变参数
!定义顶部十字梁，矩形
b2=300   !!!!!可变参数
!定义塔身参数
L1=2400  !!!!!标准节中心距
H1=2000  !标准节每档高度
N1=17 !!!!!标准节数量
N2=N1*2  !标准节档数
N3=14    !!!!!附着位置，从下往上第几档上端
!定义载荷，作用与NODE((N2+1)*8+1)
FFZ=0    !!!!!顶部竖向力，单位：吨
MMT=770  !!!!!顶部弯矩，单位：吨.米
!LINK10单元参数
LLINK=100
ALINK=31400
!上层附着八个节点的反力数组：节点号，FX,FY
*DIM,UPSOL,ARRAY,8,3
UPFX=0
UPFY=0
!底部固定四个节点的反力数组：节点号，FX,FY,FZ
*DIM,DOWNSOL,ARRAY,4,4
DOWNFX=0
DOWNFY=0
DOWNFZ=0
X4 = 10000

!定义单元类型、材料属性
ET,1,BEAM188
MP,EX,1,2.1E5
MP,PRXY,1,0.3
MP,DENS,1,7.85E-9

ET,2,LINK10
R,2,ALINK
MP,EX,2,2.1E6    !特别加强刚度
MP,DENS,2,7.85E-9
KEYOPT,2,3,1     !1表示仅受压，0表示仅受拉

!定义立柱截面，H型钢
SECTYPE,1,BEAM,I,,0
SECOFFSET,CENT
SECDATA,w1,w1,w2,t1,t1,t2
!定义腹杆截面，方管
!SECTYPE,2,BEAM,HREC,,0
!SECOFFSET,CENT
!SECDATA,b1,b1,t3,t3,t3,t3
!定义腹杆截面，角钢
SECTYPE,2,BEAM,L,,0
SECOFFSET,CENT
SECDATA,b1,b1,t3,t3
!定义顶部十字梁，矩形
SECTYPE,3,BEAM,RECT,,0
SECOFFSET,CENT
SECDATA,b2,b2

!定义节点
*DO,i,1,(N2+1)
N,((i-1)*8+1),L1/2 ,L1/2 ,(i-1)*H1
N,((i-1)*8+2),L1/2 ,0    ,(i-1)*H1
N,((i-1)*8+3),L1/2 ,-L1/2,(i-1)*H1
N,((i-1)*8+4),0    ,-L1/2,(i-1)*H1
N,((i-1)*8+5),-L1/2,-L1/2,(i-1)*H1
N,((i-1)*8+6),-L1/2,0    ,(i-1)*H1
N,((i-1)*8+7),-L1/2,L1/2 ,(i-1)*H1
N,((i-1)*8+8),0    ,L1/2 ,(i-1)*H1
*ENDDO
N,((N2+1)*8+1),0,0,N2*H1  !顶部中心点
!定义附着处8个LINK10仅受压单元的节点
!N3*8+1
N,((N2+1)*8+2),L1/2+LLINK ,L1/2       ,N3*H1  !X
N,((N2+1)*8+3),L1/2       ,L1/2+LLINK ,N3*H1  !Y
!N3*8+3
N,((N2+1)*8+4),L1/2+LLINK ,-L1/2      ,N3*H1  !X
N,((N2+1)*8+5),L1/2       ,-L1/2-LLINK,N3*H1  !Y
!N3*8+5
N,((N2+1)*8+6),-L1/2-LLINK,-L1/2      ,N3*H1  !X
N,((N2+1)*8+7),-L1/2      ,-L1/2-LLINK,N3*H1  !Y
!N3*8+7
N,((N2+1)*8+8),-L1/2-LLINK,L1/2       ,N3*H1  !X
N,((N2+1)*8+9),-L1/2      ,L1/2+LLINK ,N3*H1  !Y
!建立单元
TYPE,1
MAT,1
!1、立柱单元
SECNUM,1
*DO,i,1,N2
E,((i-1)*8+1),(i*8+1)
E,((i-1)*8+3),(i*8+3)
E,((i-1)*8+5),(i*8+5)
E,((i-1)*8+7),(i*8+7)
*ENDDO
!2、腹杆单元
SECNUM,2

*IF,TTYPE,EQ,1,THEN  !TTYPE=1四面人字腹杆
!2-1、横腹杆
*DO,i,1,(N2+1)
E,((i-1)*8+1),((i-1)*8+2)
E,((i-1)*8+2),((i-1)*8+3)
E,((i-1)*8+3),((i-1)*8+4)
E,((i-1)*8+4),((i-1)*8+5)
E,((i-1)*8+5),((i-1)*8+6)
E,((i-1)*8+6),((i-1)*8+7)
E,((i-1)*8+7),((i-1)*8+8)
E,((i-1)*8+8),((i-1)*8+1)
*ENDDO
!2-2、斜腹杆
*DO,i,1,N2
E,((i-1)*8+1),(i*8+2)
E,((i-1)*8+3),(i*8+2)
E,((i-1)*8+3),(i*8+4)
E,((i-1)*8+5),(i*8+4)
E,((i-1)*8+5),(i*8+6)
E,((i-1)*8+7),(i*8+6)
E,((i-1)*8+7),(i*8+8)
E,((i-1)*8+1),(i*8+8)
*ENDDO
*ELSEIF,TTYPE,EQ,2  !TTYPE=2四面K形腹杆
!2-1、横腹杆
*DO,i,1,(N2+1)
E,((i-1)*8+1),((i-1)*8+2)
E,((i-1)*8+2),((i-1)*8+3)
E,((i-1)*8+3),((i-1)*8+4)
E,((i-1)*8+4),((i-1)*8+5)
E,((i-1)*8+5),((i-1)*8+6)
E,((i-1)*8+6),((i-1)*8+7)
E,((i-1)*8+7),((i-1)*8+8)
E,((i-1)*8+8),((i-1)*8+1)
*ENDDO
!2-2、斜腹杆
*DO,i,1,N2-1,2
E,((i-1)*8+1),(i*8+3)
E,((i-1)*8+5),(i*8+3)
E,((i-1)*8+5),(i*8+7)
E,((i-1)*8+1),(i*8+7)
*ENDDO
*DO,i,2,N2,2
E,((i-1)*8+3),(i*8+1)
E,((i-1)*8+3),(i*8+5)
E,((i-1)*8+7),(i*8+5)
E,((i-1)*8+7),(i*8+1)
*ENDDO
*ELSE   !TTYPE=3人字+顺斜腹杆
!2-1、横腹杆
*DO,i,1,(N2+1)
E,((i-1)*8+1),((i-1)*8+2)
E,((i-1)*8+2),((i-1)*8+3)
E,((i-1)*8+3),((i-1)*8+4)
E,((i-1)*8+4),((i-1)*8+5)
E,((i-1)*8+5),((i-1)*8+6)
E,((i-1)*8+6),((i-1)*8+7)
E,((i-1)*8+7),((i-1)*8+8)
E,((i-1)*8+8),((i-1)*8+1)
*ENDDO
!2-2、斜腹杆
*DO,i,1,N2
E,((i-1)*8+1),(i*8+2)
E,((i-1)*8+3),(i*8+2)
E,((i-1)*8+5),(i*8+6)
E,((i-1)*8+7),(i*8+6)

E,((i-1)*8+1),(i*8+7)
E,((i-1)*8+5),(i*8+3)
*ENDDO

*ENDIF

!3、顶部十字单元
SECNUM,3
E,((N2+1)*8+1),(N2*8+1)
E,((N2+1)*8+1),(N2*8+3)
E,((N2+1)*8+1),(N2*8+5)
E,((N2+1)*8+1),(N2*8+7)
!4、附着处LINK10单元
TYPE,2
MAT,2
REAL,2
E,N3*8+1,((N2+1)*8+2)
E,N3*8+1,((N2+1)*8+3)
E,N3*8+3,((N2+1)*8+4)
E,N3*8+3,((N2+1)*8+5)
E,N3*8+5,((N2+1)*8+6)
E,N3*8+5,((N2+1)*8+7)
E,N3*8+7,((N2+1)*8+8)
E,N3*8+7,((N2+1)*8+9)
!定义边界条件
!底部固定约束
D,1,ALL,0
D,3,ALL,0
D,5,ALL,0
D,7,ALL,0
!附着处LINK10节点约束XY两向位移
*DO,I,0,7
D,((N2+1)*8+2)+I,UX,0
D,((N2+1)*8+2)+I,UY,0
*ENDDO
!定义载荷，作用与NODE((N2+1)*8+1)

*IF,JJ,EQ,1,THEN  !工况1
F,((N2+1)*8+1),FZ,-FFZ*10000
F,((N2+1)*8+1),MX,MMT*10000000
F,((N2+1)*8+1),MY,0
*ELSEIF,JJ,EQ,2  !工况2
F,((N2+1)*8+1),FZ,-FFZ*10000
F,((N2+1)*8+1),MX,(MMT/1.414)*10000000
F,((N2+1)*8+1),MY,(MMT/1.414)*10000000
*ELSEIF,JJ,EQ,3  !工况3
F,((N2+1)*8+1),FZ,-FFZ*10000
F,((N2+1)*8+1),MX,0
F,((N2+1)*8+1),MY,MMT*10000000
*ELSEIF,JJ,EQ,4  !工况4
F,((N2+1)*8+1),FZ,-FFZ*10000
F,((N2+1)*8+1),MX,-(MMT/1.414)*10000000
F,((N2+1)*8+1),MY,(MMT/1.414)*10000000
*ELSEIF,JJ,EQ,5  !工况5
F,((N2+1)*8+1),FZ,-FFZ*10000
F,((N2+1)*8+1),MX,-MMT*10000000
F,((N2+1)*8+1),MY,0
*ELSEIF,JJ,EQ,6  !工况6
F,((N2+1)*8+1),FZ,-FFZ*10000
F,((N2+1)*8+1),MX,-(MMT/1.414)*10000000
F,((N2+1)*8+1),MY,-(MMT/1.414)*10000000
*ELSEIF,JJ,EQ,7  !工况7
F,((N2+1)*8+1),FZ,-FFZ*10000
F,((N2+1)*8+1),MX,0
F,((N2+1)*8+1),MY,-MMT*10000000
*ELSE  !工况8
F,((N2+1)*8+1),FZ,-FFZ*10000
F,((N2+1)*8+1),MX,(MMT/1.414)*10000000
F,((N2+1)*8+1),MY,-(MMT/1.414)*10000000
*ENDIF

!求解
/SOLU
!ACEL,,,9800  !重力加速度，若考虑自重则去掉前面的感叹号
ALLSEL,ALL
!NLGEOM,1      !开启大变形开关
SOLVE

!后处理提取结果数据
/POST1
!提取上层附着8个节点的反力
*DO,I,1,8
UPSOL(I,1)=((N2+1)*8+1)+I
*ENDDO

*DO,I,1,8
*GET,UPSOL(I,2),NODE,UPSOL(I,1),RF,FX
*GET,UPSOL(I,3),NODE,UPSOL(I,1),RF,FY
*ENDDO
!附着位置XY两个方向合力
*DO,I,1,8
UPFX=UPFX+UPSOL(I,2)
*ENDDO
*DO,I,1,8
UPFY=UPFY+UPSOL(I,3)
*ENDDO

!提取底部固定四个节点的反力
DOWNSOL(1,1)=1
DOWNSOL(2,1)=3
DOWNSOL(3,1)=5
DOWNSOL(4,1)=7
*DO,I,1,4
*GET,DOWNSOL(I,2),NODE,DOWNSOL(I,1),RF,FX
*GET,DOWNSOL(I,3),NODE,DOWNSOL(I,1),RF,FY
*GET,DOWNSOL(I,4),NODE,DOWNSOL(I,1),RF,FZ
*ENDDO
!底部位置三个方向合力
*DO,I,1,4
DOWNFX=DOWNFX+DOWNSOL(I,2)
*ENDDO
*DO,I,1,4
DOWNFY=DOWNFY+DOWNSOL(I,3)
*ENDDO
*DO,I,1,4
DOWNFZ=DOWNFZ+DOWNSOL(I,4)
*ENDDO


!写出结果到文件
*CFOPEN,TT1,txt,,Append

*IF,LL,EQ,0,THEN
*VWRITE,
('-----一层附着工况反力求解-----')
!塔身总高
*VWRITE,N2*H1/1000,'m'
('塔身总长H=',F12.2,'|',A12)
!第一层附着高度
*VWRITE,N3*H1/1000,'m'
('第一层附着高度A=',F12.2,'|',A12)
!悬臂高度
*VWRITE,(N2-N3)*H1/1000,'m'
('悬臂高度C=',F12.2,'|',A12)
*IF,TTYPE,EQ,1,THEN
*VWRITE,
('标准节类型：四面人字腹杆')
*ELSEIF,TTYPE,EQ,2
*VWRITE,
('标准节类型：四面K形腹杆')
*ELSE
*VWRITE,
('标准节类型：人字+顺斜腹杆')
*ENDIF
!标准节中心距
*VWRITE,L1,'mm'
('塔身中心距L1=',F12.2,'|',A12)
!标准节立柱截面尺寸
*VWRITE,w1,'x',w2,'x',t2,'x',t1
('立柱截面','H型钢',F4.0,A1,F4.0,A1,F4.0,A1,F4.0)
!腹杆截面尺寸
*VWRITE,b1,'x',t3
('腹杆截面','角钢',F4.0,A1,F4.0)
!弯矩
*VWRITE,MMT,'t.m'
('顶部弯矩M=',F12.2,'|',A12)
!垂直力
*VWRITE,FFZ,'t'
('顶部垂直力F_V=',F12.2,'|',A12)


*VWRITE,'F','N1','N3','N5','N7'
(A8,'|',A8,'|',A8,'|',A8,'|',A8)

*ENDIF

!*VWRITE,
!('----------------------------------')
!*VWRITE,FLAG
!('求解结果-工况',F8.0)
!*VWRITE,
!('----------------------------------')
!*VWRITE,'F','N1','N3','N5','N7'
!(A8,'|',A8,'|',A8,'|',A8,'|',A8)
*VWRITE,UPFY/X4,DOWNSOL(1,4)/X4,DOWNSOL(2,4)/X4,DOWNSOL(3,4)/X4,DOWNSOL(4,4)/X4
(F8.2,'|',F8.2,'|',F8.2,'|',F8.2,'|',F8.2)


!*VWRITE,
!('-----附着反力-----')
!*VWRITE,'Node','F_X(t)','F_Y(t)'
!(A8,'|',A12,'|',A12)
!*DO,J,1,8
!*VWRITE,UPSOL(J,1)/1,UPSOL(J,2)/X4,UPSOL(J,3)/X4
!(F8.0,'|',F12.2,'|',F12.2)
!*ENDDO
!*VWRITE,'Total',UPFX/X4,UPFY/X4
!(A8,'|',F12.2,'|',F12.2)
!*VWRITE,
!('----底部柱脚反力----')
!*VWRITE,'Node','F_X(t)','F_Y(t)','F_Z(t)'
!(A8,'|',A12,'|',A12,'|',A12)
!*DO,J,1,4
!*VWRITE,DOWNSOL(J,1)/1,DOWNSOL(J,2)/X4,DOWNSOL(J,3)/X4,DOWNSOL(J,4)/X4
!(F8.0,'|',F12.2,'|',F12.2,'|',F12.2)
!*ENDDO
!*VWRITE,'Total',DOWNFX/X4,DOWNFY/X4,DOWNFZ/X4
!(A8,'|',F12.2,'|',F12.2,'|',F12.2)
*CFCLOS
!写出到文件结束
!*ENDDO
*ENDDO
*ENDDO     !循环求解结束
