!2019年1月8日
!塔身建模分析宏
!标准节类型：1-四面人字腹杆 2-四面K形腹杆 3-人字+顺斜腹杆
!独立工况
![自动提取结果][增量求解][理论对比]
!Z+为向上方向
!
!*DO,KK,1,3,1  !循环3种标准节类型求解开始

TTYPE=2  !标准节类型
FLAG=0   !循环计次变量
!*DO,HH,17,17,1   !标准节数量高度60米到96米，逐节增加
FLAG=0   !循环计次变量
*DO,JJ,1,4,1   !循环4工况求解开始
!JJ=3
FLAG=FLAG+1
PARSAV  !清空前保存标量参数
/CLEAR
PARRES  !清空后释放标量参数
/PREP7
!所有输入参数定义
!定义立柱截面，H型钢
w1=407
w2=428
t1=35   !!上下
t2=20+34   !!!腹板!!补板子计算等效腹板厚度，如果是两侧封板，也用等效腹板厚度
!定义立柱截面，H型钢基础节1
ww1=407
ww2=428
tt1=35   !!上下
tt2=20+60   !!!腹板!!补板子
!定义立柱截面，H型钢基础节2
ww3=407
ww4=428
tt3=35   !!上下
tt4=20+40   !!!腹板!!补板子
!定义腹杆截面   手动定义不用此参数
b1=180
t3=8   !!!!!可变参数
!定义顶部十字梁，矩形
b2=300   !!!!!可变参数
!定义塔身参数
L1=2800  !!!!!标准节中心距
H1=3000  !标准节每档高度
N1=13    !!!!!标准节数量，塔身高度
N2=N1*2  !标准节档数

!定义载荷，作用与NODE((N2+1)*8+1)

FFZ=266+95+120+239-172  !最后一个数是标准节重量补差  !!!!!顶部竖向力，单位：吨，减去塔身后的上部重量加吊重
MMT=2250!2076 !!!!!顶部弯矩，单位：吨.米

!底部固定四个节点的反力数组：节点号，FX,FY,FZ
*DIM,DOWNSOL,ARRAY,4,4
DOWNFX=0
DOWNFY=0
DOWNFZ=0
X4 = 10000

!定义单元类型、材料属性
ET,1,BEAM188
MP,EX,1,2.1E5
MP,PRXY,1,0.3
MP,DENS,1,7.85E-9

!定义立柱截面，H型钢
SECTYPE,1,BEAM,I,,0
SECOFFSET,CENT
SECDATA,w1,w1,w2,t1,t1,t2
!定义腹杆截面，方管
!SECTYPE,2,BEAM,HREC,,0
!SECOFFSET,CENT
!SECDATA,b1,b1,t3,t3,t3,t3
!定义腹杆截面，角钢
!SECTYPE,2,BEAM,L,,0
!SECOFFSET,CENT
!SECDATA,b1,b1,t3,t3
!定义腹杆截面，H型钢
SECTYPE,2,BEAM,I,,0
SECOFFSET,CENT
SECDATA,250,250,250,14,14,9
!定义顶部十字梁，矩形
SECTYPE,3,BEAM,RECT,,0
SECOFFSET,CENT
SECDATA,b2,b2
!定义立柱截面，H型钢,基础节1
SECTYPE,4,BEAM,I,,0
SECOFFSET,CENT
SECDATA,ww1,ww1,ww2,tt1,tt1,tt2
!定义立柱截面，H型钢,基础节2
SECTYPE,5,BEAM,I,,0
SECOFFSET,CENT
SECDATA,ww3,ww3,ww4,tt3,tt3,tt4
!定义节点
*DO,i,1,(N2+1)
N,((i-1)*8+1),L1/2 ,L1/2 ,(i-1)*H1
N,((i-1)*8+2),L1/2 ,0    ,(i-1)*H1
N,((i-1)*8+3),L1/2 ,-L1/2,(i-1)*H1
N,((i-1)*8+4),0    ,-L1/2,(i-1)*H1
N,((i-1)*8+5),-L1/2,-L1/2,(i-1)*H1
N,((i-1)*8+6),-L1/2,0    ,(i-1)*H1
N,((i-1)*8+7),-L1/2,L1/2 ,(i-1)*H1
N,((i-1)*8+8),0    ,L1/2 ,(i-1)*H1
*ENDDO
N,((N2+1)*8+1),0,0,N2*H1  !顶部中心点


!建立单元
TYPE,1
MAT,1
!1、立柱单元
SECNUM,4  !定义立柱截面，H型钢,基础节1
*DO,i,1,3   !9m基础节加强  3档
E,((i-1)*8+1),(i*8+1)
E,((i-1)*8+3),(i*8+3)
E,((i-1)*8+5),(i*8+5)
E,((i-1)*8+7),(i*8+7)
*ENDDO
SECNUM,5  !定义立柱截面，H型钢,基础节2
*DO,i,4,6   !9m基础节加强  3档
E,((i-1)*8+1),(i*8+1)
E,((i-1)*8+3),(i*8+3)
E,((i-1)*8+5),(i*8+5)
E,((i-1)*8+7),(i*8+7)
*ENDDO


SECNUM,1
*DO,i,7,N2
E,((i-1)*8+1),(i*8+1)
E,((i-1)*8+3),(i*8+3)
E,((i-1)*8+5),(i*8+5)
E,((i-1)*8+7),(i*8+7)
*ENDDO


!2、腹杆单元
SECNUM,2

*IF,TTYPE,EQ,1,THEN  !TTYPE=1四面人字腹杆
!2-1、横腹杆
*DO,i,1,(N2+1)
E,((i-1)*8+1),((i-1)*8+2)
E,((i-1)*8+2),((i-1)*8+3)
E,((i-1)*8+3),((i-1)*8+4)
E,((i-1)*8+4),((i-1)*8+5)
E,((i-1)*8+5),((i-1)*8+6)
E,((i-1)*8+6),((i-1)*8+7)
E,((i-1)*8+7),((i-1)*8+8)
E,((i-1)*8+8),((i-1)*8+1)
*ENDDO
!2-2、斜腹杆
*DO,i,1,N2
E,((i-1)*8+1),(i*8+2)
E,((i-1)*8+3),(i*8+2)
E,((i-1)*8+3),(i*8+4)
E,((i-1)*8+5),(i*8+4)
E,((i-1)*8+5),(i*8+6)
E,((i-1)*8+7),(i*8+6)
E,((i-1)*8+7),(i*8+8)
E,((i-1)*8+1),(i*8+8)
*ENDDO
*ELSEIF,TTYPE,EQ,2  !TTYPE=2四面K形腹杆
!2-1、横腹杆
*DO,i,1,(N2+1)
E,((i-1)*8+1),((i-1)*8+2)
E,((i-1)*8+2),((i-1)*8+3)
E,((i-1)*8+3),((i-1)*8+4)
E,((i-1)*8+4),((i-1)*8+5)
E,((i-1)*8+5),((i-1)*8+6)
E,((i-1)*8+6),((i-1)*8+7)
E,((i-1)*8+7),((i-1)*8+8)
E,((i-1)*8+8),((i-1)*8+1)
*ENDDO
!2-2、斜腹杆
*DO,i,1,N2-1,2
E,((i-1)*8+1),(i*8+3)
E,((i-1)*8+5),(i*8+3)
E,((i-1)*8+5),(i*8+7)
E,((i-1)*8+1),(i*8+7)
*ENDDO
*DO,i,2,N2,2
E,((i-1)*8+3),(i*8+1)
E,((i-1)*8+3),(i*8+5)
E,((i-1)*8+7),(i*8+5)
E,((i-1)*8+7),(i*8+1)
*ENDDO
*ELSE   !TTYPE=3人字+顺斜腹杆
!2-1、横腹杆
*DO,i,1,(N2+1)
E,((i-1)*8+1),((i-1)*8+2)
E,((i-1)*8+2),((i-1)*8+3)
E,((i-1)*8+3),((i-1)*8+4)
E,((i-1)*8+4),((i-1)*8+5)
E,((i-1)*8+5),((i-1)*8+6)
E,((i-1)*8+6),((i-1)*8+7)
E,((i-1)*8+7),((i-1)*8+8)
E,((i-1)*8+8),((i-1)*8+1)
*ENDDO
!2-2、斜腹杆
*DO,i,1,N2
E,((i-1)*8+1),(i*8+2)
E,((i-1)*8+3),(i*8+2)
E,((i-1)*8+5),(i*8+6)
E,((i-1)*8+7),(i*8+6)

E,((i-1)*8+1),(i*8+7)
E,((i-1)*8+5),(i*8+3)
*ENDDO

*ENDIF

!3、顶部十字单元
SECNUM,3
E,((N2+1)*8+1),(N2*8+1)
E,((N2+1)*8+1),(N2*8+3)
E,((N2+1)*8+1),(N2*8+5)
E,((N2+1)*8+1),(N2*8+7)


!定义边界条件
!底部固定约束
D,1,ALL,0
D,3,ALL,0
D,5,ALL,0
D,7,ALL,0

!定义载荷，作用与NODE((N2+1)*8+1)
*IF,JJ,EQ,1,THEN  !工况1
F,((N2+1)*8+1),FZ,-FFZ*10000
F,((N2+1)*8+1),MX,MMT*10000000
F,((N2+1)*8+1),MY,0
*ELSEIF,JJ,EQ,2  !工况2
F,((N2+1)*8+1),FZ,-FFZ*10000
F,((N2+1)*8+1),MX,(MMT/1.414)*10000000
F,((N2+1)*8+1),MY,(MMT/1.414)*10000000
*ELSEIF,JJ,EQ,3  !工况3
F,((N2+1)*8+1),FZ,-FFZ*10000
F,((N2+1)*8+1),MX,0
F,((N2+1)*8+1),MY,MMT*10000000
*ELSEIF,JJ,EQ,4  !工况4
F,((N2+1)*8+1),FZ,-FFZ*10000
F,((N2+1)*8+1),MX,-(MMT/1.414)*10000000
F,((N2+1)*8+1),MY,(MMT/1.414)*10000000
*ELSEIF,JJ,EQ,5  !工况5
F,((N2+1)*8+1),FZ,-FFZ*10000
F,((N2+1)*8+1),MX,-MMT*10000000
F,((N2+1)*8+1),MY,0
*ELSEIF,JJ,EQ,6  !工况6
F,((N2+1)*8+1),FZ,-FFZ*10000
F,((N2+1)*8+1),MX,-(MMT/1.414)*10000000
F,((N2+1)*8+1),MY,-(MMT/1.414)*10000000
*ELSEIF,JJ,EQ,7  !工况7
F,((N2+1)*8+1),FZ,-FFZ*10000
F,((N2+1)*8+1),MX,0
F,((N2+1)*8+1),MY,-MMT*10000000
*ELSE  !工况8
F,((N2+1)*8+1),FZ,-FFZ*10000
F,((N2+1)*8+1),MX,(MMT/1.414)*10000000
F,((N2+1)*8+1),MY,-(MMT/1.414)*10000000
*ENDIF

!求解
/SOLU
ACEL,,,9800  !重力加速度，若考虑自重则去掉前面的感叹号
ALLSEL,ALL
NLGEOM,ON!打开大变形开关
SOLVE

!后处理提取结果数据
/POST1

!提取底部固定四个节点的反力
DOWNSOL(1,1)=1
DOWNSOL(2,1)=3
DOWNSOL(3,1)=5
DOWNSOL(4,1)=7
*DO,I,1,4
*GET,DOWNSOL(I,2),NODE,DOWNSOL(I,1),RF,FX
*GET,DOWNSOL(I,3),NODE,DOWNSOL(I,1),RF,FY
*GET,DOWNSOL(I,4),NODE,DOWNSOL(I,1),RF,FZ
*ENDDO
!底部位置三个方向合力
*DO,I,1,4
DOWNFX=DOWNFX+DOWNSOL(I,2)
*ENDDO
*DO,I,1,4
DOWNFY=DOWNFY+DOWNSOL(I,3)
*ENDDO
*DO,I,1,4
DOWNFZ=DOWNFZ+DOWNSOL(I,4)
*ENDDO
!写出结果到文件
*CFOPEN,FREE,txt,,Append


*IF,JJ,EQ,1,THEN
*VWRITE,
('-----独立工况反力求解-----')
!塔身总高
*VWRITE,N2*H1/1000,'m'
('塔身总长H=',F12.2,'|',A12)
*IF,TTYPE,EQ,1,THEN
*VWRITE,
('标准节类型：四面人字腹杆')
*ELSEIF,TTYPE,EQ,2
*VWRITE,
('标准节类型：四面K形腹杆')
*ELSE
*VWRITE,
('标准节类型：人字+顺斜腹杆')
*ENDIF
!标准节中心距
*VWRITE,L1,'mm'
('塔身中心距L1=',F12.2,'|',A12)
!标准节立柱截面尺寸
*VWRITE,w1,'x',w2,'x',t2,'x',t1
('立柱截面','H型钢',F4.0,A1,F4.0,A1,F4.0,A1,F4.0)
!腹杆截面尺寸
*VWRITE,b1,'x',t3
('腹杆截面','角钢',F4.0,A1,F4.0)
!弯矩
*VWRITE,MMT,'t.m'
('顶部弯矩M=',F12.2,'|',A12)
!垂直力
*VWRITE,FFZ,'t'
('顶部垂直力F_V=',F12.2,'|',A12)
*ENDIF

*VWRITE,
('----------------------------------')
*VWRITE,FLAG
('求解结果-工况',F8.0)
*VWRITE,
('----------------------------------')


*VWRITE,
('----柱脚支点反力----')
*VWRITE,'Node','F_X(t)','F_Y(t)','F_Z(t)'
(A8,'|',A12,'|',A12,'|',A12)
*DO,J,1,4
*VWRITE,DOWNSOL(J,1)/1,DOWNSOL(J,2)/X4,DOWNSOL(J,3)/X4,DOWNSOL(J,4)/X4
(F8.0,'|',F12.2,'|',F12.2,'|',F12.2)
*ENDDO
*VWRITE,'Total',DOWNFX/X4,DOWNFY/X4,DOWNFZ/X4
(A8,'|',F12.2,'|',F12.2,'|',F12.2)
TP1=0
*VWRITE,
('最大合位移')
NSORT,U,SUM,0,1,ALL
*GET,TP1,SORT,0,MAX
*VWRITE,TP1
(F13.2)
*VWRITE,
('---------------END----------------')
*CFCLOS
!写出到文件结束
*ENDDO
!*ENDDO     !循环求解结束
